// SBML level 3 version 1

model main()
  // model units - substance: mole, time: second, volume: litre, area: square_metre, length: metre, extent: mole

  // Compartments:
  compartment default = 1e-6;

  // Species:
  species protein_lacI in default = 0;
  species dna_lacI_tetR in default = 0;
  species protein_tetR in default = 0;
  species rna_lacI_tetR in default = 0;
  species rna_tetR_cl in default = 0;
  species dna_tetR_cl in default = 0;
  species protein_cl in default = 0;
  species rna_cl_lacI in default = 0;
  species dna_cl_lacI in default = 0;

  // Reactions:
  r0: dna_lacI_tetR => dna_lacI_tetR + rna_lacI_tetR; r0_k*dna_lacI_tetR/(protein_lacI^r0_n + r0_K);
    r0_k = 0.01875; r0_n = 2; r0_K = 20;
  r1: dna_lacI_tetR => dna_lacI_tetR + rna_lacI_tetR; r1_k*dna_lacI_tetR;
    r1_k = 1e-6;
  r2: rna_lacI_tetR => rna_lacI_tetR + protein_tetR; r2_k*rna_lacI_tetR;
    r2_k = 0.15;
  r3: dna_tetR_cl => dna_tetR_cl + rna_tetR_cl; r3_k*dna_tetR_cl/(protein_tetR^r3_n + r3_K);
    r3_k = 0.01875; r3_n = 2; r3_K = 20;
  r4: dna_tetR_cl => dna_tetR_cl + rna_tetR_cl; r4_k*dna_tetR_cl;
    r4_k = 1e-6;
  r5: rna_tetR_cl => rna_tetR_cl + protein_cl; r5_k*rna_tetR_cl;
    r5_k = 0.15;
  r6: dna_cl_lacI => dna_cl_lacI + rna_cl_lacI; r6_k*dna_cl_lacI/(protein_cl^r6_n + r6_K);
    r6_k = 0.01875; r6_n = 2; r6_K = 20;
  r7: dna_cl_lacI => dna_cl_lacI + rna_cl_lacI; r7_k*dna_cl_lacI;
    r7_k = 1e-6;
  r8: rna_cl_lacI => rna_cl_lacI + protein_lacI; r8_k*rna_cl_lacI;
    r8_k = 0.15;
  r9: protein_lacI => ; r9_k*protein_lacI;
    r9_k = 0.001;
  r10: protein_tetR => ; r10_k*protein_tetR;
    r10_k = 0.001;
  r11: rna_lacI_tetR => ; r11_k*rna_lacI_tetR;
    r11_k = 0.001;
  r12: rna_tetR_cl => ; r12_k*rna_tetR_cl;
    r12_k = 0.001;
  r13: protein_cl => ; r13_k*protein_cl;
    r13_k = 0.001;
  r14: rna_cl_lacI => ; r14_k*rna_cl_lacI;
    r14_k = 0.001;
  r15: rna_lacI_tetR => ; r15_k*rna_lacI_tetR;
    r15_k = 0.002;
  r16: rna_tetR_cl => ; r16_k*rna_tetR_cl;
    r16_k = 0.002;
  r17: rna_cl_lacI => ; r17_k*rna_cl_lacI;
    r17_k = 0.002;

  // Unit definitions:
  unit square_metre = metre^2;
end
